<?xml version="1.0" encoding="UTF-8"?>
<neuroml xmlns="http://www.neuroml.org/schema/neuroml2" xmlns:xsi="http://www.w3.org/2001/XMLSchema-instance" xsi:schemaLocation="http://www.neuroml.org/schema/neuroml2  https://raw.githubusercontent.com/NeuroML/NeuroML2/development/Schemas/NeuroML2/NeuroML_v2beta4.xsd" id="network_Hippocampus">

    <notes>

Network structure (NeuroML 2beta4) for project: Hippocampus saved with neuroConstruct v1.7.1 on: 16:09:51, 29-Jan-16

Cell Group: OLM_Inters contains 10 cells
Cell Group: CA1Pyrs contains 20 cells

Network connection: NetConn_CA1Pyrs_OLM_Inters contains 400 individual synaptic connections
Network connection: AAConn_1 contains 60 individual synaptic connections
Network connection: NetConn_CA1Pyrs_CA1Pyrs contains 200 individual synaptic connections

    </notes>

    <include href="CA1Pyramidal.cell.nml"/>
    <include href="DoubExpSyn.synapse.nml"/>
    <include href="GABA_A.synapse.nml"/>
    <include href="KDR.channel.nml"/>
    <include href="LeakConductance.channel.nml"/>
    <include href="NaF.channel.nml"/>
    <include href="OLMInterneuron.cell.nml"/>
    <poissonFiringSynapse id="Input_0" averageRate="200.0 per_s" synapse="DoubExpSyn" spikeTarget="./DoubExpSyn"/>

    <network id="network_Hippocampus" type="networkWithTemperature" temperature="6.3 degC">

        <population id="OLM_Inters" component="OLMInterneuron" type="populationList" size="10">
            <instance id="0">
                <location x="319.0819" y="154.65172" z="85.70787"/>
            </instance>
            <instance id="1">
                <location x="300.2495" y="101.15132" z="180.84985"/>
            </instance>
            <instance id="2">
                <location x="306.52856" y="18.019844" z="70.19602"/>
            </instance>
            <instance id="3">
                <location x="912.106" y="118.9816" z="83.132484"/>
            </instance>
            <instance id="4">
                <location x="568.53394" y="135.31093" z="60.310448"/>
            </instance>
            <instance id="5">
                <location x="304.93158" y="119.934654" z="101.05295"/>
            </instance>
            <instance id="6">
                <location x="694.7969" y="78.881226" z="68.75914"/>
            </instance>
            <instance id="7">
                <location x="847.5994" y="98.911964" z="32.800926"/>
            </instance>
            <instance id="8">
                <location x="246.79393" y="148.89777" z="87.53058"/>
            </instance>
            <instance id="9">
                <location x="415.19897" y="55.556034" z="42.78817"/>
            </instance>
        </population>

        <population id="CA1Pyrs" component="CA1Pyramidal" type="populationList" size="20">
            <instance id="0">
                <location x="261.64114" y="227.4249" z="78.82482"/>
            </instance>
            <instance id="1">
                <location x="146.52086" y="224.64067" z="17.624628"/>
            </instance>
            <instance id="2">
                <location x="70.87803" y="224.14359" z="151.51054"/>
            </instance>
            <instance id="3">
                <location x="412.5796" y="231.85545" z="155.60474"/>
            </instance>
            <instance id="4">
                <location x="36.205353" y="227.69989" z="28.44106"/>
            </instance>
            <instance id="5">
                <location x="275.136" y="231.15804" z="59.083557"/>
            </instance>
            <instance id="6">
                <location x="638.73206" y="220.7232" z="112.68834"/>
            </instance>
            <instance id="7">
                <location x="305.04208" y="221.03891" z="181.06604"/>
            </instance>
            <instance id="8">
                <location x="927.545" y="230.84872" z="31.762623"/>
            </instance>
            <instance id="9">
                <location x="974.2273" y="221.7043" z="24.938345"/>
            </instance>
            <instance id="10">
                <location x="958.7118" y="224.86566" z="34.823322"/>
            </instance>
            <instance id="11">
                <location x="192.88379" y="231.56467" z="36.36799"/>
            </instance>
            <instance id="12">
                <location x="148.76848" y="234.98643" z="35.750317"/>
            </instance>
            <instance id="13">
                <location x="938.18884" y="225.11136" z="122.215294"/>
            </instance>
            <instance id="14">
                <location x="323.54468" y="220.94777" z="125.7005"/>
            </instance>
            <instance id="15">
                <location x="571.1024" y="216.43132" z="90.384926"/>
            </instance>
            <instance id="16">
                <location x="434.09174" y="224.12605" z="129.60088"/>
            </instance>
            <instance id="17">
                <location x="558.0606" y="226.97018" z="79.048134"/>
            </instance>
            <instance id="18">
                <location x="225.79968" y="215.26588" z="23.00484"/>
            </instance>
            <instance id="19">
                <location x="737.1997" y="226.99571" z="133.23213"/>
            </instance>
        </population>

        <projection synapse="DoubExpSyn" id="NetConn_CA1Pyrs_OLM_Inters" presynapticPopulation="CA1Pyrs" postsynapticPopulation="OLM_Inters">
            <connection id="0" preCellId="../CA1Pyrs/0/CA1Pyramidal" postCellId="../OLM_Inters/3/OLMInterneuron" preSegmentId="0" preFractionAlong="0.5" postSegmentId="3" postFractionAlong="0.41000137"/>
            <connection id="1" preCellId="../CA1Pyrs/0/CA1Pyramidal" postCellId="../OLM_Inters/3/OLMInterneuron" preSegmentId="0" preFractionAlong="0.5" postSegmentId="5" postFractionAlong="0.8185455"/>
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        </projection>

        <projection synapse="GABA_A" id="AAConn_1" presynapticPopulation="OLM_Inters" postsynapticPopulation="CA1Pyrs">
            <connection id="0" preCellId="../OLM_Inters/0/OLMInterneuron" postCellId="../CA1Pyrs/5/CA1Pyramidal" preSegmentId="0" preFractionAlong="0.5" postSegmentId="71" postFractionAlong="0.037871696"/>
            <connection id="1" preCellId="../OLM_Inters/0/OLMInterneuron" postCellId="../CA1Pyrs/5/CA1Pyramidal" preSegmentId="0" preFractionAlong="0.5" postSegmentId="67" postFractionAlong="0.50552094"/>
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        </projection>

        <projection synapse="DoubExpSyn" id="NetConn_CA1Pyrs_CA1Pyrs" presynapticPopulation="CA1Pyrs" postsynapticPopulation="CA1Pyrs">
            <connection id="0" preCellId="../CA1Pyrs/0/CA1Pyramidal" postCellId="../CA1Pyrs/18/CA1Pyramidal" preSegmentId="0" preFractionAlong="0.5" postSegmentId="7" postFractionAlong="0.50396574"/>
            <connection id="1" preCellId="../CA1Pyrs/0/CA1Pyramidal" postCellId="../CA1Pyrs/6/CA1Pyramidal" preSegmentId="0" preFractionAlong="0.5" postSegmentId="70" postFractionAlong="0.32728404"/>
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        </projection>

        <inputList id="Input_0" component="Input_0" population="CA1Pyrs">
            <input id="0" target="../CA1Pyrs/0/CA1Pyramidal" destination="synapses" segmentId="67" fractionAlong="0.64918476"/>
            <input id="1" target="../CA1Pyrs/0/CA1Pyramidal" destination="synapses" segmentId="72" fractionAlong="0.8872084"/>
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        </inputList>

    </network>

</neuroml>
